<?xml version="1.0" encoding="UTF-8"?>

<neuroml xmlns="http://www.neuroml.org/schema/neuroml2"
	 xmlns:xsi="http://www.w3.org/2001/XMLSchema-instance"
	 xsi:schemaLocation="http://www.neuroml.org/schema/neuroml2  http://neuroml.svn.sourceforge.net/viewvc/neuroml/NeuroML2/Schemas/NeuroML2/NeuroML_v2alpha.xsd"
	 id="SK">

    <ionChannel id = "SK" conductance = "10pS" type = "ionChannelHH" species = "k">
        <notes>SK type of Calcium dependent K channel - no voltage dependence</notes>
        <gate id = "m" type = "gateHH" instances = "1">
            <q10Settings type = "q10ExpTemp" q10Factor = "1" experimentalTemp = "20.0 degC" celsius = "30.0 degC"/>
	         <!-- if q10Factor > 1, then time constant will be divided by q10 for every 10 degrees -->

	    <steadyState type="SteadyStateSigmoidConc" max="1" HillCoef="5.4" midpoint="0.57e-3 mM"/>
	    <timeCourse type="FixedTimeCourse" tau="4 ms"/>
        </gate>
    </ionChannel>

    <ComponentType name = "SteadyStateSigmoidConc" extends = "voltageConcDepVariable">
        <Parameter name="max" dimension="none"/>
        <Parameter name="midpoint" dimension="concentration"/>
        <Parameter name="HillCoef" dimension="none"/>
        <Behavior>
                                                                                    <!--NOTE: max not used in expression!!-->
            <DerivedVariable name = "inf" exposure = "x" dimension = "none" value = "caConc^HillCoef / (caConc^HillCoef + midpoint^HillCoef) "/>
        </Behavior>
    </ComponentType>

<!-- New component type: voltage and conc dep, but returns ss, not tau -->
    <ComponentType name="VoltageConcDepVariable" extends = "voltageDepVariable"
               description="Base type for calcium dependent steady state ComponentType">
        <Exposure name="inf" dimension="none"/>
        <Requirement name="caConc" dimension="concentration"/>
        <Requirement name="v" dimension="voltage"/>
    </ComponentType>

</neuroml>
